<?xml version="1.0" encoding="UTF-8"?>
<channelml xmlns="http://morphml.org/channelml/schema" xmlns:xsi="http://www.w3.org/2001/XMLSchema-instance" xmlns:meta="http://morphml.org/metadata/schema" xsi:schemaLocation="http://morphml.org/channelml/schema  http://www.neuroml.org/NeuroMLValidator/NeuroMLFiles/Schemata/v1.8.1/Level2/ChannelML_v1.8.1.xsd" units="Physiological Units">

    <meta:notes>ChannelML file containing a single Channel description</meta:notes>

    <channel_type name="Ca_LVAst" density="yes">

        <status value="stable">
            <meta:contributor>
                <meta:name>Padraig Gleeson</meta:name>
            </meta:contributor>
        </status>

        <meta:notes>Low voltage activated Ca2+ current

Comment from original mod file:
Note: mtau is an approximation from the plots
:Reference : :		Avery and Johnston 1996, tau from Randall 1997
:Comment: shifted by -10 mv to correct for junction potential
:Comment: corrected rates using q10 = 2.3, target temperature 34, orginal 21</meta:notes>

        <meta:authorList>
            <meta:modelAuthor>
                <meta:name>Etay Hay</meta:name>
            </meta:modelAuthor>
            <meta:modelTranslator>
                <meta:name>Padraig Gleeson</meta:name>
                <meta:institution>UCL</meta:institution>
                <meta:email>p.gleeson - at - ucl.ac.uk</meta:email>
            </meta:modelTranslator>
        </meta:authorList>

        <meta:publication>
            <meta:fullTitle>Models of Neocortical Layer 5b Pyramidal Cells Capturing a Wide Range of Dendritic and Perisomatic Active Properties,
            Etay Hay, Sean Hill, Felix Schürmann, Henry Markram and Idan Segev, PLoS Comp Biol 2011</meta:fullTitle>
            <meta:pubmedRef>http://www.ncbi.nlm.nih.gov/pubmed/21829333</meta:pubmedRef>
        </meta:publication>

        <meta:neuronDBref>
            <meta:modelName>Ca channels</meta:modelName>
            <meta:uri>http://senselab.med.yale.edu/neurondb/channelGene2.aspx#table1</meta:uri>
        </meta:neuronDBref>

        <current_voltage_relation cond_law="ohmic" ion="ca" default_erev="110" default_gmax="120" charge="2">

            <!-- NOTE:  even though form below (where q10 is calculated from celsius) could be used in
                 simulations setting celsius = 34, the models from ModelDB were run at 6.3, and since this
                 affects the reversal potential of Ca, the NeuroML/neuroConstruct version of the model
                 must be run at 6.3 also => use fixed_q10 -->
            <!--<q10_settings q10_factor="2.3" experimental_temp="21"/>-->

            <q10_settings fixed_q10="2.95288264" experimental_temp="34"/>

            <gate name="m" instances="2">
                <closed_state id="m0"/>
                <open_state id="m"/>

                <time_course name="tau" from="m0" to="m" expr_form="generic" expr="5 + 20 / (1 + (exp ((v+35)/5) ))" />

                <steady_state name="inf" from="m0" to="m" expr_form="sigmoid" rate="1" scale="-6" midpoint="-40"/>
            </gate>

            <gate name="h" instances="1">
                <closed_state id="h0"/>
                <open_state id="h"/>

                <time_course name="tau" from="h0" to="h" expr_form="generic" expr="20 + 50 / (1 + (exp ((v+50)/7) ))" />

                <steady_state name="inf" from="h0" to="h" expr_form="sigmoid" rate="1" scale="6.4" midpoint="-90"/>
            </gate>

        </current_voltage_relation>

        <impl_prefs>
            <table_settings max_v="150" min_v="-150" table_divisions="4000"/>
        </impl_prefs>

    </channel_type>
</channelml>
