<?xml version="1.0" encoding="UTF-8"?>
<channelml xmlns="http://morphml.org/channelml/schema" xmlns:xsi="http://www.w3.org/2001/XMLSchema-instance" xmlns:meta="http://morphml.org/metadata/schema" xsi:schemaLocation="http://morphml.org/channelml/schema http://www.neuroml.org/NeuroMLValidator/NeuroMLFiles/Schemata/v1.8.0/Level2/ChannelML_v1.8.0.xsd" units="Physiological Units">

    <meta:notes>ChannelML file containing a single Channel description</meta:notes>

    <channel_type name="Ih">

        <status value="stable">
            <meta:contributor>
                <meta:name>Padraig Gleeson</meta:name>
            </meta:contributor>
        </status>

        <meta:notes>Non-specific cation current

Comment from original mod file:
Reference : :		Kole,Hallermann,and Stuart, J. Neurosci. 2006</meta:notes>

        <meta:authorList>
            <meta:modelAuthor>
                <meta:name>Etay Hay</meta:name>
            </meta:modelAuthor>
            <meta:modelTranslator>
                <meta:name>Padraig Gleeson</meta:name>
                <meta:institution>UCL</meta:institution>
                <meta:email>p.gleeson - at - ucl.ac.uk</meta:email>
            </meta:modelTranslator>
        </meta:authorList>

        <meta:publication>
            <meta:fullTitle>Models of Neocortical Layer 5b Pyramidal Cells Capturing a Wide Range of Dendritic and Perisomatic Active Properties,
            Etay Hay, Sean Hill, Felix Schürmann, Henry Markram and Idan Segev, PLoS Comp Biol 2011</meta:fullTitle>
            <meta:pubmedRef>http://www.ncbi.nlm.nih.gov/pubmed/21829333</meta:pubmedRef>
        </meta:publication>

        <current_voltage_relation cond_law="ohmic" ion="hcn" default_gmax="36" default_erev="-45">

            <gate name="m" instances="1">
                <closed_state id="m0"/>
                <open_state id="m"/>

                <transition name="alpha" from="m0" to="m" expr_form="exp_linear" rate="0.076517" scale="-11.9" midpoint="-154.9"/>
                <transition name="beta" from="m" to="m0" expr_form="exponential" rate="0.193" scale="33.1" midpoint="0"/>

            </gate>
        </current_voltage_relation>

        <impl_prefs>
		<table_settings max_v="150" min_v="-150" table_divisions="4000"/>
	</impl_prefs>

    </channel_type>
</channelml>
