<?xml version="1.0" encoding="UTF-8"?>
<channelml xmlns="http://morphml.org/channelml/schema" xmlns:xsi="http://www.w3.org/2001/XMLSchema-instance" xmlns:meta="http://morphml.org/metadata/schema"
           xsi:schemaLocation="http://morphml.org/channelml/schema  http://www.neuroml.org/NeuroMLValidator/NeuroMLFiles/Schemata/v1.8.1/Level2/ChannelML_v1.8.1.xsd"
           units="Physiological Units">

    <meta:notes>ChannelML file containing a single Channel description</meta:notes>

    <channel_type name="Nap_Et2" density="yes">

        <status value="stable">
            <meta:contributor>
                <meta:name>Padraig Gleeson</meta:name>
            </meta:contributor>
        </status>

        <meta:notes>Persistent Na+ current

Comment from original mod file:
:Comment : mtau deduced from text (said to be 6 times faster than for NaTa)
:Comment : so I used the equations from NaT and multiplied by 6
:Reference : Modeled according to kinetics derived from Magistretti and Alonso 1999
:Comment: corrected rates using q10 = 2.3, target temperature 34, orginal 21</meta:notes>

        <meta:authorList>
            <meta:modelAuthor>
                <meta:name>Etay Hay</meta:name>
            </meta:modelAuthor>
            <meta:modelTranslator>
                <meta:name>Padraig Gleeson</meta:name>
                <meta:institution>UCL</meta:institution>
                <meta:email>p.gleeson - at - ucl.ac.uk</meta:email>
            </meta:modelTranslator>
        </meta:authorList>

        <meta:publication>
            <meta:fullTitle>Models of Neocortical Layer 5b Pyramidal Cells Capturing a Wide Range of Dendritic and Perisomatic Active Properties,
            Etay Hay, Sean Hill, Felix Schürmann, Henry Markram and Idan Segev, PLoS Comp Biol 2011</meta:fullTitle>
            <meta:pubmedRef>http://www.ncbi.nlm.nih.gov/pubmed/21829333</meta:pubmedRef>
        </meta:publication>

        <meta:neuronDBref>
            <meta:modelName>Na channels</meta:modelName>
            <meta:uri>http://senselab.med.yale.edu/neurondb/channelGene2.aspx#table2</meta:uri>
        </meta:neuronDBref>

        <current_voltage_relation cond_law="ohmic" ion="na" default_erev="50" default_gmax="120">

            <!-- NOTE:  even though form below (where q10 is calculated from celsius) could be used in
                 simulations setting celsius = 34, the models from ModelDB were run at 6.3, and since this
                 affects the reversal potential of Ca, the NeuroML/neuroConstruct version of the model
                 must be run at 6.3 also => use fixed_q10 -->
            <!--<q10_settings q10_factor="2.3" experimental_temp="21"/>-->

            <q10_settings fixed_q10="2.95288264" experimental_temp="34"/>

            <gate name="m" instances="3">
                <closed_state id="m0"/>
                <open_state id="m"/>

                <transition name="alpha" from="m0" to="m" expr_form="exp_linear" rate="1.092" scale="6" midpoint="-38"/>
                <transition name="beta" from="m" to="m0"  expr_form="exp_linear" rate="0.744" scale="-6" midpoint="-38"/>

                <!-- Condition put in to catch errors on initialisation, e.g. alpha = beta = 0 -->
                <time_course name="tau" from="m0" to="m" expr_form="generic" expr="(alpha + beta) &gt; 0 ? 6/( (alpha + beta) ) : 0" />
                <steady_state name="inf" from="m0" to="m" expr_form="sigmoid" rate="1" scale="-4.6" midpoint="-52.6"/>
            </gate>

            <gate name="h" instances="1">
                <closed_state id="h0"/>
                <open_state id="h"/>

                <transition name="alpha" from="h0" to="h" expr_form="exp_linear" rate="1.33344e-05" scale="-4.63" midpoint="-17"/>
                <transition name="beta" from="h" to="h0"  expr_form="exp_linear" rate="1.82522e-05" scale="2.63" midpoint="-64.4"/>

                <steady_state name="inf" from="h0" to="h" expr_form="sigmoid" rate="1" scale="10" midpoint="-48.8"/>
            </gate>

        </current_voltage_relation>
        <impl_prefs>
            <table_settings max_v="150" min_v="-150" table_divisions="4000"/>
        </impl_prefs>

    </channel_type>
</channelml>
