<?xml version="1.0" encoding="UTF-8"?>
<channelml xmlns="http://morphml.org/channelml/schema" xmlns:xsi="http://www.w3.org/2001/XMLSchema-instance" xmlns:meta="http://morphml.org/metadata/schema" xsi:schemaLocation="http://morphml.org/channelml/schema http://www.neuroml.org/NeuroMLValidator/NeuroMLFiles/Schemata/v1.8.0/Level2/ChannelML_v1.8.0.xsd" units="Physiological Units">

    <meta:notes>ChannelML file containing a single Channel description</meta:notes>

    <channel_type name="SKv3_1">

        <status value="stable">
            <meta:contributor>
                <meta:name>Padraig Gleeson</meta:name>
            </meta:contributor>
        </status>

        <meta:notes>Fast, non inactivating K+ current

Comment from original mod file:
:Reference : :		Characterization of a Shaw-related potassium channel family in rat brain, The EMBO Journal, vol.11, no.7,2473-2486 (1992)</meta:notes>

        <meta:authorList>
            <meta:modelAuthor>
                <meta:name>Etay Hay</meta:name>
            </meta:modelAuthor>
            <meta:modelTranslator>
                <meta:name>Padraig Gleeson</meta:name>
                <meta:institution>UCL</meta:institution>
                <meta:email>p.gleeson - at - ucl.ac.uk</meta:email>
            </meta:modelTranslator>
        </meta:authorList>

        <meta:publication>
            <meta:fullTitle>Models of Neocortical Layer 5b Pyramidal Cells Capturing a Wide Range of Dendritic and Perisomatic Active Properties,
            Etay Hay, Sean Hill, Felix Schürmann, Henry Markram and Idan Segev, PLoS Comp Biol 2011</meta:fullTitle>
            <meta:pubmedRef>http://www.ncbi.nlm.nih.gov/pubmed/21829333</meta:pubmedRef>
        </meta:publication>

        <meta:neuronDBref>
            <meta:modelName>K channels</meta:modelName>
            <meta:uri>http://senselab.med.yale.edu/neurondb/channelGene2.aspx#table3</meta:uri>
        </meta:neuronDBref>

        <current_voltage_relation cond_law="ohmic" ion="k" default_gmax="36" default_erev="-85">

            <gate name="m" instances="1">
                <closed_state id="m0"/>
                <open_state id="m"/>

                <!--It's better to use a generic expression here, as opposed to one of the "standard" HH types
                <time_course name="tau" from="m0" to="m" expr_form="sigmoid" rate="4" scale="-44.140" midpoint="-46.560"/>-->
                <time_course name="tau" from="m0" to="m" expr_form="generic" expr="4/(1 + exp( (v+46.56) / (-44.140) ))"/>
                <steady_state name="inf" from="m0" to="m" expr_form="sigmoid" rate="1" scale="-9.7" midpoint="18.7"/>

            </gate>
        </current_voltage_relation>

        <impl_prefs>
		<table_settings max_v="150" min_v="-150" table_divisions="4000"/>
	</impl_prefs>

    </channel_type>
</channelml>
