<?xml version="1.0" encoding="ISO-8859-1"?>

<!--
       This file has been generated by neuroConstruct because a cell mechanism (NeuroML 2 Component [InstanceName: CaDynamics_E2_NML2, neuroml2File: CaDynamics_E2_NML2.nml])
      has a different set of parameters (decay = 122.0, gamma = 5.09E-4) on a group of sections.

      Conversion of the original NML2 file to use the updated parameters is implemented in handleExtraParamsForNml2()
      in https://github.com/NeuralEnsemble/neuroConstruct/blob/master/src/ucl/physiol/neuroconstruct/neuroml/NeuroMLFileManager.java
      See that file to check/improve this conversion
-->

<neuroml xmlns="http://www.neuroml.org/schema/neuroml2"
         xmlns:xsi="http://www.w3.org/2001/XMLSchema-instance"
         xsi:schemaLocation="http://www.neuroml.org/schema/neuroml2 https://raw.github.com/NeuroML/NeuroML2/development/Schemas/NeuroML2/NeuroML_v2beta3.xsd"
         id="CaDynamics_E2_NML2__decay122__gamma5_09Emin4">

    <notes>NeuroML 2 implementation of the Ca Pool mechanism</notes>

    <!--<decayingPoolConcentrationModel id="CaDynamics_E2_NML2__decay122__gamma5_09Emin4" restingConc="1e-10mol_per_cm3" decayConstant="80ms" ion="ca" shellThickness="2.787e-4cm"/>-->

    <concentrationModel id="CaDynamics_E2_NML2__decay122__gamma5_09Emin4" type="concentrationModelHayEtAl" minCai="1e-4 mM" decay="122.0 ms" depth="0.1 um" gamma="5.09E-4 " ion="ca"/>

    <!--
    This is a new, custom ComponentType to handle the calcium mechanism with parameters

    PARAMETER	{
        gamma = 0.05 : percent of free calcium (not buffered)
        decay = 80 (ms) : rate of removal of calcium
        depth = 0.1 (um) : depth of shell
        minCai = 1e-4 (mM)
    }

    and derivative mechanism:

    DERIVATIVE states	{
        cai' = -(10000)*(ica*gamma/(2*FARADAY*depth)) - (cai - minCai)/decay
    }

    See https://github.com/OpenSourceBrain/L5bPyrCellHayEtAl2011/blob/master/neuroConstruct/cellMechanisms/CaDynamics_E2_init_mod/CaDynamics_E2.mod

    -->

    <!--<ComponentType name="concentrationModelHayEtAl" extends="concentrationModel" description="Model of buffering of concentration of specific to Hay Et Al 2011">

        <Parameter name="gamma" dimension="none"/>
        <Parameter name="minCai" dimension="concentration"/>
        <Parameter name="decay" dimension="time"/>
        <Parameter name="depth" dimension="length"/>

        <Constant name="Faraday" dimension="charge_per_mole" value="96485.3C_per_mol"/>
        <Constant name="AREA_SCALE" dimension="area" value="1m2"/>
        <Constant name="LENGTH_SCALE" dimension="length" value="1m"/>

        <Requirement name="iCa" dimension="current"/>

        <Text name="species"/>

        <Dynamics>

            <StateVariable name="concentration" exposure="concentration" dimension="concentration"/>
            <StateVariable name="extConcentration" exposure="extConcentration" dimension="concentration"/>

            <DerivedVariable name="currDensCa" dimension="currentDensity" value="iCa / surfaceArea"/>

            <TimeDerivative variable="concentration" value="(currDensCa*gamma/(2*Faraday*depth)) - ((concentration - minCai) / decay)"/>

            <OnStart>
                <StateAssignment variable="concentration" value="initialConcentration"/>
                <StateAssignment variable="extConcentration" value="initialExtConcentration"/>
            </OnStart>

        </Dynamics>

    </ComponentType>-->

</neuroml>
