<?xml version="1.0" encoding="ISO-8859-1"?>
<neuroml xmlns="http://www.neuroml.org/schema/neuroml2" xmlns:xsi="http://www.w3.org/2001/XMLSchema-instance" xsi:schemaLocation="http://www.neuroml.org/schema/neuroml2 https://raw.github.com/NeuroML/NeuroML2/development/Schemas/NeuroML2/NeuroML_v2beta4.xsd" id="Ih">

    <notes>NeuroML file containing a single Channel description</notes>

    <ionChannel id="Ih" conductance="10pS" type="ionChannelHH" species="hcn">

        <notes>Non-specific cation current

Comment from original mod file:
Reference : :		Kole,Hallermann,and Stuart, J. Neurosci. 2006</notes>

        <annotation>

            <rdf:RDF xmlns:rdf="http://www.w3.org/1999/02/22-rdf-syntax-ns#">

                <rdf:Description rdf:about="Ih">

                    <bqmodel:isDescribedBy xmlns:bqmodel="http://biomodels.net/model-qualifiers/">

                        <rdf:Bag>

                            <rdf:li>Models of Neocortical Layer 5b Pyramidal Cells Capturing a Wide Range of Dendritic and Perisomatic Active Properties,
            Etay Hay, Sean Hill, Felix Schürmann, Henry Markram and Idan Segev, PLoS Comp Biol 2011</rdf:li>

                            <rdf:li rdf:resource="http://www.ncbi.nlm.nih.gov/pubmed/21829333"/>

                        </rdf:Bag>

                    </bqmodel:isDescribedBy>

                </rdf:Description>

            </rdf:RDF>

        </annotation>

        <gate id="m" type="gateHHrates" instances="1">

            <forwardRate type="HHExpLinearRate" rate="0.076517per_ms" scale="-11.9mV" midpoint="-154.9mV"/>

            <reverseRate type="HHExpRate" rate="0.193per_ms" scale="33.1mV" midpoint="0mV"/>

        </gate>

    </ionChannel>

</neuroml>
