<?xml version="1.0" encoding="UTF-8"?>
<neuroml xmlns="http://www.neuroml.org/schema/neuroml2" xmlns:xsi="http://www.w3.org/2001/XMLSchema-instance" xsi:schemaLocation="http://www.neuroml.org/schema/neuroml2  https://raw.githubusercontent.com/NeuroML/NeuroML2/development/Schemas/NeuroML2/NeuroML_v2beta3.xsd" id="L5PC">

    <include href="Ca_HVA.channel.nml"/>

    <include href="Ca_LVAst.channel.nml"/>

    <include href="CaDynamics_E2_NML2__decay122__gamma5_09Emin4.nml"/>

    <include href="CaDynamics_E2_NML2__decay460__gamma5_01Emin4.nml"/>

    <include href="Ih.channel.nml"/>

    <include href="Im.channel.nml"/>

    <include href="K_Pst.channel.nml"/>

    <include href="K_Tst.channel.nml"/>

    <include href="Nap_Et2.channel.nml"/>

    <include href="NaTa_t.channel.nml"/>

    <include href="pas.channel.nml"/>

    <include href="SK_E2.channel.nml"/>

    <include href="SKv3_1.channel.nml"/>

    <cell id="L5PC">

        <notes>Cell: L5PCtemplate_0 exported from NEURON ModelView</notes>

        <morphology id="morphology_L5PC">

            <segment id="0" name="Seg0_soma_0">
                <proximal x="34.1634" y="17.6215" z="-50.25" diameter="3.80039"/>
                <distal x="35.3196" y="17.6937" z="-50.25" diameter="6.44373"/>
            </segment>

            <segment id="2" name="Seg1_soma_0">
                <parent segment="0"/>
                <distal x="36.4758" y="17.766" z="-50.25" diameter="9.60449"/>
            </segment>

            <segment id="3" name="Seg2_soma_0">
                <parent segment="2"/>
                <distal x="37.632" y="17.8382" z="-50.25" diameter="12.1828"/>
            </segment>

            <segment id="4" name="Seg3_soma_0">
                <parent segment="3"/>
                <distal x="38.7883" y="17.9104" z="-50.25" diameter="14.0603"/>
            </segment>

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
            <segmentGroup id="soma_0" neuroLexId="sao864921383">    <!--
                This group contains an unbranched set of segments, and all of the segmentGroups marked with
                neuroLexId = sao864921383 form a non-overlapping set of all of the segments.
                These segmentGroups correspond to the 'cables' of NeuroML v1.8.1. -->

                <member segment="0"/>

                <member segment="2"/>

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            </segmentGroup>

            <segmentGroup id="axon_0" neuroLexId="sao864921383">    <!--
                This group contains an unbranched set of segments, and all of the segmentGroups marked with
                neuroLexId = sao864921383 form a non-overlapping set of all of the segments.
                These segmentGroups correspond to the 'cables' of NeuroML v1.8.1. -->

                <member segment="4067"/>

                <member segment="4068"/>
            </segmentGroup>

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
            <segmentGroup id="soma_group" neuroLexId="GO:0043025">    <!--Soma group-->

                <include segmentGroup="soma_0"/>
            </segmentGroup>

            <segmentGroup id="apical_dends_and_soma">
                <include segmentGroup="soma_0"/>
                <include segmentGroup="apic_0"/>
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            </segmentGroup>

            <segmentGroup id="dends_and_soma">
                <include segmentGroup="soma_0"/>
                <include segmentGroup="apic_0"/>
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            </segmentGroup>

            <segmentGroup id="soma_and_axon">
                <include segmentGroup="soma_0"/>
                <include segmentGroup="axon_0"/>
                <include segmentGroup="axon_1"/>
            </segmentGroup>

            <segmentGroup id="basal_dends_and_soma">
                <include segmentGroup="soma_0"/>
                <include segmentGroup="dend_79"/>
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            </segmentGroup>

            <segmentGroup id="axon_group" neuroLexId="GO:0030424">    <!--Axon group-->

                <include segmentGroup="axon_0"/>
                <include segmentGroup="axon_1"/>
            </segmentGroup>

            <segmentGroup id="dendrite_group" neuroLexId="GO:0030425">    <!--Dendrite group-->

                <include segmentGroup="apic_0"/>
                <include segmentGroup="dend_79"/>
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            </segmentGroup>

            <segmentGroup id="apical_dends">
                <include segmentGroup="apic_0"/>
                <include segmentGroup="apic_104"/>
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
                <inhomogeneousParameter id="PathLengthOverApicDends" variable="p" metric="Path Length from root">
                    <proximal translationStart="0"/>
                </inhomogeneousParameter>

            </segmentGroup>

            <segmentGroup id="non_hot_apical_dends">
                <include segmentGroup="apic_0"/>
                <include segmentGroup="apic_104"/>
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            </segmentGroup>

            <segmentGroup id="OneSecGrp_SectionRef_3">
                <include segmentGroup="apic_0"/>
            </segmentGroup>

            <segmentGroup id="basal_dends">
                <include segmentGroup="dend_79"/>
                <include segmentGroup="dend_78"/>
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            </segmentGroup>

            <segmentGroup id="OneSecGrp_SectionRef_13">
                <include segmentGroup="apic_104"/>
            </segmentGroup>

            <segmentGroup id="OneSecGrp_SectionRef_14">
                <include segmentGroup="apic_1"/>
            </segmentGroup>

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
        </morphology>

            <!--Adding the biophysical parameters-->

        <biophysicalProperties id="biophys">

            <membraneProperties>

                <channelDensity condDensity="81.2 mS_per_cm2" id="K_Tst_soma_group" ionChannel="K_Tst" segmentGroup="soma_group" ion="k" erev="-85.0 mV"/>

                <channelDensity condDensity="1.72 mS_per_cm2" id="Nap_Et2_soma_group" ionChannel="Nap_Et2" segmentGroup="soma_group" ion="na" erev="50.0 mV"/>

                <channelDensity condDensity="0.0589 mS_per_cm2" id="pas_apical_dends" ionChannel="pas" segmentGroup="apical_dends" ion="non_specific" erev="-90.0 mV"/>

                <channelDensity condDensity="21.3 mS_per_cm2" id="NaTa_t_apical_dends" ionChannel="NaTa_t" segmentGroup="apical_dends" ion="na" erev="50.0 mV"/>

                <channelDensity condDensity="1.2 mS_per_cm2" id="SK_E2_apical_dends" ionChannel="SK_E2" segmentGroup="apical_dends" ion="k" erev="-85.0 mV"/>

                <channelDensity condDensity="0.0325 mS_per_cm2" id="pas_axon_group" ionChannel="pas" segmentGroup="axon_group" ion="non_specific" erev="-90.0 mV"/>

                <channelDensity condDensity="0.2 mS_per_cm2" id="Ih_basal_dends_and_soma" ionChannel="Ih" segmentGroup="basal_dends_and_soma" ion="hcn" erev="-45.0 mV"/>

                <channelDensity condDensity="0.0675 mS_per_cm2" id="Im_apical_dends" ionChannel="Im" segmentGroup="apical_dends" ion="k" erev="-85.0 mV"/>

                <channelDensity condDensity="693.0 mS_per_cm2" id="SKv3_1_soma_group" ionChannel="SKv3_1" segmentGroup="soma_group" ion="k" erev="-85.0 mV"/>

                <channelDensity condDensity="44.1 mS_per_cm2" id="SK_E2_soma_group" ionChannel="SK_E2" segmentGroup="soma_group" ion="k" erev="-85.0 mV"/>

                <channelDensity condDensity="0.261 mS_per_cm2" id="SKv3_1_apical_dends" ionChannel="SKv3_1" segmentGroup="apical_dends" ion="k" erev="-85.0 mV"/>

                <channelDensity condDensity="2.23 mS_per_cm2" id="K_Pst_soma_group" ionChannel="K_Pst" segmentGroup="soma_group" ion="k" erev="-85.0 mV"/>

                <channelDensity condDensity="0.0467 mS_per_cm2" id="pas_basal_dends" ionChannel="pas" segmentGroup="basal_dends" ion="non_specific" erev="-90.0 mV"/>

                <channelDensity condDensity="2040.0 mS_per_cm2" id="NaTa_t_soma_group" ionChannel="NaTa_t" segmentGroup="soma_group" ion="na" erev="50.0 mV"/>

                <channelDensity condDensity="0.0338 mS_per_cm2" id="pas_soma_group" ionChannel="pas" segmentGroup="soma_group" ion="non_specific" erev="-90.0 mV"/>

                <!--Reversal potential for ca in Ca_HVA will be calculated by Nernst equation from internal & external calcium-->

                <channelDensityNernst condDensity="0.992 mS_per_cm2" id="Ca_HVA_soma_group" ionChannel="Ca_HVA" segmentGroup="soma_group" ion="ca"/>

                <!--Reversal potential for ca in Ca_LVAst will be calculated by Nernst equation from internal & external calcium-->

                <channelDensityNernst condDensity="3.43 mS_per_cm2" id="Ca_LVAst_soma_group" ionChannel="Ca_LVAst" segmentGroup="soma_group" ion="ca"/>

                <!--Ih with param: gmax = f(p) = (1.0E-8 * 0.2) * ((2.087 * exp(p / 359.65)) - 0.8696) on ParameterisedGroup: PathLengthOverApicDends on: apical_dends with metric: Path Length from root (MOST_PROX_AT_0, NO_NORMALISATION), var: p-->

                <channelDensityNonUniform id="Ih_apical_dends" ionChannel="Ih" ion="hcn" erev="-45.0 mV">
                    <variableParameter parameter="condDensity" segmentGroup="apical_dends">
                        <inhomogeneousValue inhomogeneousParameter="PathLengthOverApicDends" value="1.0E9 * (1.0E-8 * 0.2) * ((2.087 * exp(p / 359.65)) - 0.8696)"/>    <!--Note: conversion factor (1.0E9 * ) included to convert to units: GENESIS SI Units-->

                    </variableParameter>
                </channelDensityNonUniform>

                <!--Reversal potential for ca in Ca_LVAst will be calculated by Nernst equation from internal & external calcium
    Ca_LVAst with param: gmax = f(p) = 1.0E-8 * (0.187 + (18.513 * (H(p - 685) * H(885 - p)))) on ParameterisedGroup: PathLengthOverApicDends on: apical_dends with metric: Path Length from root (MOST_PROX_AT_0, NO_NORMALISATION), var: p-->

                <channelDensityNonUniformNernst id="Ca_LVAst_apical_dends" ionChannel="Ca_LVAst" ion="ca">
                    <variableParameter parameter="condDensity" segmentGroup="apical_dends">
                        <inhomogeneousValue inhomogeneousParameter="PathLengthOverApicDends" value="1.0E9 * 1.0E-8 * (0.187 + (18.513 * (H(p - 685) * H(885 - p))))"/>    <!--Note: conversion factor (1.0E9 * ) included to convert to units: GENESIS SI Units-->

                    </variableParameter>
                </channelDensityNonUniformNernst>

                <!--Reversal potential for ca in Ca_HVA will be calculated by Nernst equation from internal & external calcium
    Ca_HVA with param: gmax = f(p) = 1.0E-8 * (0.0555 + (0.4995 * (H(p - 685) * H(885 - p)))) on ParameterisedGroup: PathLengthOverApicDends on: apical_dends with metric: Path Length from root (MOST_PROX_AT_0, NO_NORMALISATION), var: p-->

                <channelDensityNonUniformNernst id="Ca_HVA_apical_dends" ionChannel="Ca_HVA" ion="ca">
                    <variableParameter parameter="condDensity" segmentGroup="apical_dends">
                        <inhomogeneousValue inhomogeneousParameter="PathLengthOverApicDends" value="1.0E9 * 1.0E-8 * (0.0555 + (0.4995 * (H(p - 685) * H(885 - p))))"/>    <!--Note: conversion factor (1.0E9 * ) included to convert to units: GENESIS SI Units-->

                    </variableParameter>
                </channelDensityNonUniformNernst>

                <spikeThresh value="0 mV"/>

                <specificCapacitance segmentGroup="soma_and_axon" value="1.0 uF_per_cm2"/>

                <specificCapacitance segmentGroup="dendrite_group" value="2.0 uF_per_cm2"/>

                <initMembPotential value="-80.0 mV"/>

            </membraneProperties>

            <intracellularProperties>

                <species segmentGroup="soma_group" id="ca" ion="ca" concentrationModel="CaDynamics_E2_NML2__decay460__gamma5_01Emin4" initialConcentration="5.0E-11 mol_per_cm3" initialExtConcentration="2.0E-6 mol_per_cm3"/>

                <species segmentGroup="apical_dends" id="ca" ion="ca" concentrationModel="CaDynamics_E2_NML2__decay122__gamma5_09Emin4" initialConcentration="5.0E-11 mol_per_cm3" initialExtConcentration="2.0E-6 mol_per_cm3"/>

                <resistivity value="0.1 kohm_cm"/>

            </intracellularProperties>

        </biophysicalProperties>

    </cell>

</neuroml>
