<?xml version="1.0" encoding="UTF-8"?>
<neuroml xmlns="http://www.neuroml.org/schema/neuroml2" xmlns:xsi="http://www.w3.org/2001/XMLSchema-instance" xsi:schemaLocation="http://www.neuroml.org/schema/neuroml2  https://raw.github.com/NeuroML/NeuroML2/master/Schemas/NeuroML2/NeuroML_v2beta.xsd" id="L5PCbiophys3_pas">

    <include href="pas.nml"/>

    <cell id="L5PCbiophys3_pas">

        <notes>Cell: L5PCtemplate_0 exported from NEURON ModelView</notes>

        <morphology id="morphology_L5PCbiophys3_pas">

            <segment id="0" name="Seg0_soma_0">
                <proximal x="34.1634" y="17.6215" z="-50.25" diameter="3.80039"/>
                <distal x="35.3196" y="17.6937" z="-50.25" diameter="6.44373"/>
            </segment>

            <segment id="2" name="Seg1_soma_0">
                <parent segment="0"/>
                <distal x="36.4758" y="17.766" z="-50.25" diameter="9.60449"/>
            </segment>

            <segment id="3" name="Seg2_soma_0">
                <parent segment="2"/>
                <distal x="37.632" y="17.8382" z="-50.25" diameter="12.1828"/>
            </segment>

            <segment id="4" name="Seg3_soma_0">
                <parent segment="3"/>
                <distal x="38.7883" y="17.9104" z="-50.25" diameter="14.0603"/>
            </segment>

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
            <segmentGroup id="soma_0">
                <member segment="0"/>

                <member segment="2"/>

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            </segmentGroup>

            <segmentGroup id="axon_0">
                <member segment="4067"/>

                <member segment="4068"/>
            </segmentGroup>

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
            <segmentGroup id="ModelViewParmSubset_5">
                <include segmentGroup="soma_0"/>
                <include segmentGroup="axon_0"/>
                <include segmentGroup="axon_1"/>
            </segmentGroup>

            <segmentGroup id="ModelViewParmSubset_10">
                <include segmentGroup="soma_0"/>
                <include segmentGroup="dend_79"/>
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            </segmentGroup>

            <segmentGroup id="OneSecGrp_SectionRef_1">
                <include segmentGroup="soma_0"/>
            </segmentGroup>

            <segmentGroup id="dendrite_group">
                <include segmentGroup="axon_0"/>
                <include segmentGroup="apic_0"/>
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            </segmentGroup>

            <segmentGroup id="ModelViewParmSubset_7">
                <include segmentGroup="axon_0"/>
                <include segmentGroup="axon_1"/>
            </segmentGroup>

            <segmentGroup id="ModelViewParmSubset_3">
                <include segmentGroup="apic_0"/>
                <include segmentGroup="apic_104"/>
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            </segmentGroup>

            <segmentGroup id="ModelViewParmSubset_6">
                <include segmentGroup="apic_0"/>
                <include segmentGroup="dend_79"/>
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            </segmentGroup>

            <segmentGroup id="ModelViewParmSubset_9">
                <include segmentGroup="apic_0"/>
                <include segmentGroup="apic_104"/>
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            </segmentGroup>

            <segmentGroup id="OneSecGrp_SectionRef_3">
                <include segmentGroup="apic_0"/>
            </segmentGroup>

            <segmentGroup id="ModelViewParmSubset_8">
                <include segmentGroup="dend_79"/>
                <include segmentGroup="dend_78"/>
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            </segmentGroup>

            <segmentGroup id="OneSecGrp_SectionRef_13">
                <include segmentGroup="apic_104"/>
            </segmentGroup>

            <segmentGroup id="OneSecGrp_SectionRef_14">
                <include segmentGroup="apic_1"/>
            </segmentGroup>

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
        </morphology>

            <!--Adding the biophysical parameters-->

        <biophysicalProperties id="biophys">

            <membraneProperties>

                <channelDensity condDensity="0.0467 mS_per_cm2" id="pas_ModelViewParmSubset_8" ionChannel="pas" segmentGroup="ModelViewParmSubset_8" ion="non_specific" erev="-90.0 mV"/>

                <channelDensity condDensity="0.0338 mS_per_cm2" id="pas_OneSecGrp_SectionRef_1" ionChannel="pas" segmentGroup="OneSecGrp_SectionRef_1" ion="non_specific" erev="-90.0 mV"/>

                <channelDensity condDensity="0.0325 mS_per_cm2" id="pas_ModelViewParmSubset_7" ionChannel="pas" segmentGroup="ModelViewParmSubset_7" ion="non_specific" erev="-90.0 mV"/>

                <channelDensity condDensity="0.0589 mS_per_cm2" id="pas_ModelViewParmSubset_3" ionChannel="pas" segmentGroup="ModelViewParmSubset_3" ion="non_specific" erev="-90.0 mV"/>

                <spikeThresh value="0 mV"/>

                <specificCapacitance segmentGroup="ModelViewParmSubset_5" value="1.0 uF_per_cm2"/>

                <specificCapacitance segmentGroup="ModelViewParmSubset_6" value="2.0 uF_per_cm2"/>

                <initMembPotential value="-80.0 mV"/>

            </membraneProperties>

            <intracellularProperties>

                <resistivity value="0.1 kohm_cm"/>

            </intracellularProperties>

        </biophysicalProperties>

    </cell>

</neuroml>
