<?xml version="1.0" encoding="UTF-8"?>
<neuroml xmlns="http://morphml.org/neuroml/schema"
    xmlns:mml="http://morphml.org/morphml/schema"
    xmlns:meta="http://morphml.org/metadata/schema"
    xmlns:bio="http://morphml.org/biophysics/schema"
    xmlns:cml="http://morphml.org/channelml/schema"
    xmlns:xsi="http://www.w3.org/2001/XMLSchema-instance"
    xsi:schemaLocation="http://morphml.org/neuroml/schema http://www.neuroml.org/NeuroMLValidator/NeuroMLFiles/Schemata/v1.8.1/Level3/NeuroML_Level3_v1.8.1.xsd"
    name = "NeuroML Level 2 file exported from NEURON"
    lengthUnits="micron">

<meta:notes>NeuroML Level 2 file generated from ModelView by: NEURON -- Release 7.1 (359:7f113b76a94b) 2009-10-26
Authors: Michael Hines, Sushil Kambampati and Padraig Gleeson,
Yale University and UCL</meta:notes>

<cells>
  <cell name="L5PCtemplate_0">
    <meta:notes>Cell: L5PCtemplate_0 exported from NEURON ModelView</meta:notes>
    <segments  xmlns="http://morphml.org/morphml/schema"> <!-- Changing the namespace from neuroml to morphml-->
<!-- Section: L5PCtemplate[0].soma[0] which has 21 3D points, so 20 segment(s)-->
      <segment id="0" name = "Seg0_soma_0" cable = "0">
        <proximal x="34.1634" y="17.6215" z="-50.25" diameter="3.80039"/>
        <distal x="35.3196" y="17.6937" z="-50.25" diameter="6.44373"/>
      </segment>
      <segment id="2" name = "Seg1_soma_0" parent="0" cable = "0">
        <distal x="36.4758" y="17.766" z="-50.25" diameter="9.60449"/>
      </segment>
      <segment id="3" name = "Seg2_soma_0" parent="2" cable = "0">
        <distal x="37.632" y="17.8382" z="-50.25" diameter="12.1828"/>
      </segment>
      <segment id="4" name = "Seg3_soma_0" parent="3" cable = "0">
        <distal x="38.7883" y="17.9104" z="-50.25" diameter="14.0603"/>
      </segment>
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    </segments>
    <cables  xmlns="http://morphml.org/morphml/schema"> <!-- Changing namespace from neuroml to morphml-->
      <cable id = "0" name = "soma_0" fract_along_parent = "0"/>
      <cable id = "194" name = "axon_0" fract_along_parent = "0.5"/>
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      <cablegroup name="all"> <!-- Replacing subset name ModelViewParmSubset_0 with all, as it contains all sections -->
        <cable id = "0"/>
        <cable id = "194"/>
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      </cablegroup>
      <cablegroup name="apical_dends_and_soma">
        <cable id = "0"/>
        <cable id = "85"/>
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      </cablegroup>
      <cablegroup name="dends_and_soma">
        <cable id = "0"/>
        <cable id = "85"/>
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      </cablegroup>
      <cablegroup name="apical_dends">
        <cable id = "85"/>
        <cable id = "189"/>
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            <inhomogeneous_param name="PathLengthOverApicDends" variable="p" >
                <metric>Path Length from root</metric>
                <proximal translationStart="0"/>
            </inhomogeneous_param>
      </cablegroup>
      <cablegroup name="soma_group">
        <cable id = "0"/>
      </cablegroup>
      <cablegroup name="soma_and_axon">
        <cable id = "0"/>
        <cable id = "194"/>
        <cable id = "195"/>
      </cablegroup>
      <cablegroup name="dendrite_group">
        <cable id = "85"/>
        <cable id = "80"/>
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      </cablegroup>
      <cablegroup name="axon_group">
        <cable id = "194"/>
        <cable id = "195"/>
      </cablegroup>
      <cablegroup name="basal_dends">
        <cable id = "80"/>
        <cable id = "79"/>
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      </cablegroup>
      <cablegroup name="non_hot_apical_dends">
        <cable id = "85"/>
        <cable id = "189"/>
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      </cablegroup>
      <cablegroup name="basal_dends_and_soma">
        <cable id = "0"/>
        <cable id = "80"/>
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      </cablegroup>
      <cablegroup name="OneSecGrp_SectionRef_151"> <!-- Creating a group containing a single section: L5PCtemplate[0].apic[50]... -->
        <cable id = "135"/>
      </cablegroup>
      <cablegroup name="OneSecGrp_SectionRef_152"> <!-- Creating a group containing a single section: L5PCtemplate[0].apic[37]... -->
        <cable id = "122"/>
      </cablegroup>
      <cablegroup name="OneSecGrp_SectionRef_155"> <!-- Creating a group containing a single section: L5PCtemplate[0].apic[60]... -->
        <cable id = "145"/>
      </cablegroup>
      <cablegroup name="OneSecGrp_SectionRef_156"> <!-- Creating a group containing a single section: L5PCtemplate[0].apic[51]... -->
        <cable id = "136"/>
      </cablegroup>
      <cablegroup name="OneSecGrp_SectionRef_3"> <!-- Creating a group containing a single section: L5PCtemplate[0].apic[0]... -->
        <cable id = "85"/>
      </cablegroup>
      <cablegroup name="OneSecGrp_SectionRef_14"> <!-- Creating a group containing a single section: L5PCtemplate[0].apic[1]... -->
        <cable id = "86"/>
      </cablegroup>
      <cablegroup name="OneSecGrp_SectionRef_30"> <!-- Creating a group containing a single section: L5PCtemplate[0].apic[105]... -->
        <cable id = "190"/>
      </cablegroup>
      <cablegroup name="OneSecGrp_SectionRef_55"> <!-- Creating a group containing a single section: L5PCtemplate[0].apic[103]... -->
        <cable id = "188"/>
      </cablegroup>
      <cablegroup name="OneSecGrp_SectionRef_58"> <!-- Creating a group containing a single section: L5PCtemplate[0].apic[3]... -->
        <cable id = "88"/>
      </cablegroup>
      <cablegroup name="OneSecGrp_SectionRef_79"> <!-- Creating a group containing a single section: L5PCtemplate[0].apic[102]... -->
        <cable id = "187"/>
      </cablegroup>
      <cablegroup name="OneSecGrp_SectionRef_80"> <!-- Creating a group containing a single section: L5PCtemplate[0].apic[101]... -->
        <cable id = "186"/>
      </cablegroup>
      <cablegroup name="OneSecGrp_SectionRef_83"> <!-- Creating a group containing a single section: L5PCtemplate[0].apic[79]... -->
        <cable id = "164"/>
      </cablegroup>
      <cablegroup name="OneSecGrp_SectionRef_100"> <!-- Creating a group containing a single section: L5PCtemplate[0].apic[89]... -->
        <cable id = "174"/>
      </cablegroup>
      <cablegroup name="OneSecGrp_SectionRef_101"> <!-- Creating a group containing a single section: L5PCtemplate[0].apic[87]... -->
        <cable id = "172"/>
      </cablegroup>
      <cablegroup name="OneSecGrp_SectionRef_103"> <!-- Creating a group containing a single section: L5PCtemplate[0].apic[14]... -->
        <cable id = "99"/>
      </cablegroup>
      <cablegroup name="OneSecGrp_SectionRef_112"> <!-- Creating a group containing a single section: L5PCtemplate[0].apic[93]... -->
        <cable id = "178"/>
      </cablegroup>
      <cablegroup name="OneSecGrp_SectionRef_115"> <!-- Creating a group containing a single section: L5PCtemplate[0].apic[86]... -->
        <cable id = "171"/>
      </cablegroup>
      <cablegroup name="OneSecGrp_SectionRef_116"> <!-- Creating a group containing a single section: L5PCtemplate[0].apic[83]... -->
        <cable id = "168"/>
      </cablegroup>
      <cablegroup name="OneSecGrp_SectionRef_117"> <!-- Creating a group containing a single section: L5PCtemplate[0].apic[20]... -->
        <cable id = "105"/>
      </cablegroup>
      <cablegroup name="OneSecGrp_SectionRef_124"> <!-- Creating a group containing a single section: L5PCtemplate[0].apic[95]... -->
        <cable id = "180"/>
      </cablegroup>
      <cablegroup name="OneSecGrp_SectionRef_125"> <!-- Creating a group containing a single section: L5PCtemplate[0].apic[85]... -->
        <cable id = "170"/>
      </cablegroup>
      <cablegroup name="OneSecGrp_SectionRef_126"> <!-- Creating a group containing a single section: L5PCtemplate[0].apic[84]... -->
        <cable id = "169"/>
      </cablegroup>
      <cablegroup name="OneSecGrp_SectionRef_129"> <!-- Creating a group containing a single section: L5PCtemplate[0].apic[19]... -->
        <cable id = "104"/>
      </cablegroup>
      <cablegroup name="OneSecGrp_SectionRef_131"> <!-- Creating a group containing a single section: L5PCtemplate[0].apic[13]... -->
        <cable id = "98"/>
      </cablegroup>
      <cablegroup name="OneSecGrp_SectionRef_132"> <!-- Creating a group containing a single section: L5PCtemplate[0].apic[12]... -->
        <cable id = "97"/>
      </cablegroup>
      <cablegroup name="OneSecGrp_SectionRef_133"> <!-- Creating a group containing a single section: L5PCtemplate[0].apic[10]... -->
        <cable id = "95"/>
      </cablegroup>
      <cablegroup name="OneSecGrp_SectionRef_137"> <!-- Creating a group containing a single section: L5PCtemplate[0].apic[34]... -->
        <cable id = "119"/>
      </cablegroup>
      <cablegroup name="OneSecGrp_SectionRef_141"> <!-- Creating a group containing a single section: L5PCtemplate[0].apic[18]... -->
        <cable id = "103"/>
      </cablegroup>
      <cablegroup name="OneSecGrp_SectionRef_142"> <!-- Creating a group containing a single section: L5PCtemplate[0].apic[17]... -->
        <cable id = "102"/>
      </cablegroup>
      <cablegroup name="OneSecGrp_SectionRef_143"> <!-- Creating a group containing a single section: L5PCtemplate[0].apic[9]... -->
        <cable id = "94"/>
      </cablegroup>
      <cablegroup name="OneSecGrp_SectionRef_144"> <!-- Creating a group containing a single section: L5PCtemplate[0].apic[8]... -->
        <cable id = "93"/>
      </cablegroup>
      <cablegroup name="OneSecGrp_SectionRef_145"> <!-- Creating a group containing a single section: L5PCtemplate[0].apic[36]... -->
        <cable id = "121"/>
      </cablegroup>
      <cablegroup name="OneSecGrp_SectionRef_146"> <!-- Creating a group containing a single section: L5PCtemplate[0].apic[35]... -->
        <cable id = "120"/>
      </cablegroup>
      <cablegroup name="OneSecGrp_SectionRef_147"> <!-- Creating a group containing a single section: L5PCtemplate[0].apic[33]... -->
        <cable id = "118"/>
      </cablegroup>
      <cablegroup name="OneSecGrp_SectionRef_153"> <!-- Creating a group containing a single section: L5PCtemplate[0].apic[30]... -->
        <cable id = "115"/>
      </cablegroup>
      <cablegroup name="OneSecGrp_SectionRef_154"> <!-- Creating a group containing a single section: L5PCtemplate[0].apic[29]... -->
        <cable id = "114"/>
      </cablegroup>
      <cablegroup name="OneSecGrp_SectionRef_157"> <!-- Creating a group containing a single section: L5PCtemplate[0].apic[45]... -->
        <cable id = "130"/>
      </cablegroup>
      <cablegroup name="OneSecGrp_SectionRef_158"> <!-- Creating a group containing a single section: L5PCtemplate[0].apic[38]... -->
        <cable id = "123"/>
      </cablegroup>
      <cablegroup name="OneSecGrp_SectionRef_161"> <!-- Creating a group containing a single section: L5PCtemplate[0].apic[68]... -->
        <cable id = "153"/>
      </cablegroup>
      <cablegroup name="OneSecGrp_SectionRef_162"> <!-- Creating a group containing a single section: L5PCtemplate[0].apic[61]... -->
        <cable id = "146"/>
      </cablegroup>
      <cablegroup name="OneSecGrp_SectionRef_163"> <!-- Creating a group containing a single section: L5PCtemplate[0].apic[53]... -->
        <cable id = "138"/>
      </cablegroup>
      <cablegroup name="OneSecGrp_SectionRef_164"> <!-- Creating a group containing a single section: L5PCtemplate[0].apic[52]... -->
        <cable id = "137"/>
      </cablegroup>
      <cablegroup name="OneSecGrp_SectionRef_165"> <!-- Creating a group containing a single section: L5PCtemplate[0].apic[49]... -->
        <cable id = "134"/>
      </cablegroup>
      <cablegroup name="OneSecGrp_SectionRef_167"> <!-- Creating a group containing a single section: L5PCtemplate[0].apic[40]... -->
        <cable id = "125"/>
      </cablegroup>
      <cablegroup name="OneSecGrp_SectionRef_168"> <!-- Creating a group containing a single section: L5PCtemplate[0].apic[39]... -->
        <cable id = "124"/>
      </cablegroup>
      <cablegroup name="OneSecGrp_SectionRef_170"> <!-- Creating a group containing a single section: L5PCtemplate[0].apic[69]... -->
        <cable id = "154"/>
      </cablegroup>
      <cablegroup name="OneSecGrp_SectionRef_171"> <!-- Creating a group containing a single section: L5PCtemplate[0].apic[67]... -->
        <cable id = "152"/>
      </cablegroup>
      <cablegroup name="OneSecGrp_SectionRef_177"> <!-- Creating a group containing a single section: L5PCtemplate[0].apic[44]... -->
        <cable id = "129"/>
      </cablegroup>
      <cablegroup name="OneSecGrp_SectionRef_179"> <!-- Creating a group containing a single section: L5PCtemplate[0].apic[78]... -->
        <cable id = "163"/>
      </cablegroup>
      <cablegroup name="OneSecGrp_SectionRef_180"> <!-- Creating a group containing a single section: L5PCtemplate[0].apic[75]... -->
        <cable id = "160"/>
      </cablegroup>
      <cablegroup name="OneSecGrp_SectionRef_181"> <!-- Creating a group containing a single section: L5PCtemplate[0].apic[71]... -->
        <cable id = "156"/>
      </cablegroup>
      <cablegroup name="OneSecGrp_SectionRef_182"> <!-- Creating a group containing a single section: L5PCtemplate[0].apic[70]... -->
        <cable id = "155"/>
      </cablegroup>
      <cablegroup name="OneSecGrp_SectionRef_183"> <!-- Creating a group containing a single section: L5PCtemplate[0].apic[64]... -->
        <cable id = "149"/>
      </cablegroup>
      <cablegroup name="OneSecGrp_SectionRef_184"> <!-- Creating a group containing a single section: L5PCtemplate[0].apic[63]... -->
        <cable id = "148"/>
      </cablegroup>
      <cablegroup name="OneSecGrp_SectionRef_190"> <!-- Creating a group containing a single section: L5PCtemplate[0].apic[42]... -->
        <cable id = "127"/>
      </cablegroup>
      <cablegroup name="OneSecGrp_SectionRef_191"> <!-- Creating a group containing a single section: L5PCtemplate[0].apic[77]... -->
        <cable id = "162"/>
      </cablegroup>
      <cablegroup name="OneSecGrp_SectionRef_192"> <!-- Creating a group containing a single section: L5PCtemplate[0].apic[76]... -->
        <cable id = "161"/>
      </cablegroup>
      <cablegroup name="OneSecGrp_SectionRef_193"> <!-- Creating a group containing a single section: L5PCtemplate[0].apic[73]... -->
        <cable id = "158"/>
      </cablegroup>
      <cablegroup name="OneSecGrp_SectionRef_13"> <!-- Creating a group containing a single section: L5PCtemplate[0].apic[104]... -->
        <cable id = "189"/>
      </cablegroup>
      <cablegroup name="OneSecGrp_SectionRef_29"> <!-- Creating a group containing a single section: L5PCtemplate[0].apic[106]... -->
        <cable id = "191"/>
      </cablegroup>
      <cablegroup name="OneSecGrp_SectionRef_53"> <!-- Creating a group containing a single section: L5PCtemplate[0].apic[108]... -->
        <cable id = "193"/>
      </cablegroup>
      <cablegroup name="OneSecGrp_SectionRef_54"> <!-- Creating a group containing a single section: L5PCtemplate[0].apic[107]... -->
        <cable id = "192"/>
      </cablegroup>
      <cablegroup name="OneSecGrp_SectionRef_32"> <!-- Creating a group containing a single section: L5PCtemplate[0].apic[2]... -->
        <cable id = "87"/>
      </cablegroup>
      <cablegroup name="OneSecGrp_SectionRef_31"> <!-- Creating a group containing a single section: L5PCtemplate[0].apic[99]... -->
        <cable id = "184"/>
      </cablegroup>
      <cablegroup name="OneSecGrp_SectionRef_56"> <!-- Creating a group containing a single section: L5PCtemplate[0].apic[100]... -->
        <cable id = "185"/>
      </cablegroup>
      <cablegroup name="OneSecGrp_SectionRef_57"> <!-- Creating a group containing a single section: L5PCtemplate[0].apic[80]... -->
        <cable id = "165"/>
      </cablegroup>
      <cablegroup name="OneSecGrp_SectionRef_81"> <!-- Creating a group containing a single section: L5PCtemplate[0].apic[88]... -->
        <cable id = "173"/>
      </cablegroup>
      <cablegroup name="OneSecGrp_SectionRef_82"> <!-- Creating a group containing a single section: L5PCtemplate[0].apic[81]... -->
        <cable id = "166"/>
      </cablegroup>
      <cablegroup name="OneSecGrp_SectionRef_99"> <!-- Creating a group containing a single section: L5PCtemplate[0].apic[92]... -->
        <cable id = "177"/>
      </cablegroup>
      <cablegroup name="OneSecGrp_SectionRef_84"> <!-- Creating a group containing a single section: L5PCtemplate[0].apic[4]... -->
        <cable id = "89"/>
      </cablegroup>
      <cablegroup name="OneSecGrp_SectionRef_104"> <!-- Creating a group containing a single section: L5PCtemplate[0].apic[5]... -->
        <cable id = "90"/>
      </cablegroup>
      <cablegroup name="OneSecGrp_SectionRef_119"> <!-- Creating a group containing a single section: L5PCtemplate[0].apic[11]... -->
        <cable id = "96"/>
      </cablegroup>
      <cablegroup name="OneSecGrp_SectionRef_102"> <!-- Creating a group containing a single section: L5PCtemplate[0].apic[82]... -->
        <cable id = "167"/>
      </cablegroup>
      <cablegroup name="OneSecGrp_SectionRef_111"> <!-- Creating a group containing a single section: L5PCtemplate[0].apic[94]... -->
        <cable id = "179"/>
      </cablegroup>
      <cablegroup name="OneSecGrp_SectionRef_120"> <!-- Creating a group containing a single section: L5PCtemplate[0].apic[6]... -->
        <cable id = "91"/>
      </cablegroup>
      <cablegroup name="OneSecGrp_SectionRef_114"> <!-- Creating a group containing a single section: L5PCtemplate[0].apic[90]... -->
        <cable id = "175"/>
      </cablegroup>
      <cablegroup name="OneSecGrp_SectionRef_113"> <!-- Creating a group containing a single section: L5PCtemplate[0].apic[91]... -->
        <cable id = "176"/>
      </cablegroup>
      <cablegroup name="OneSecGrp_SectionRef_123"> <!-- Creating a group containing a single section: L5PCtemplate[0].apic[96]... -->
        <cable id = "181"/>
      </cablegroup>
      <cablegroup name="OneSecGrp_SectionRef_134"> <!-- Creating a group containing a single section: L5PCtemplate[0].apic[7]... -->
        <cable id = "92"/>
      </cablegroup>
      <cablegroup name="OneSecGrp_SectionRef_135"> <!-- Creating a group containing a single section: L5PCtemplate[0].apic[98]... -->
        <cable id = "183"/>
      </cablegroup>
      <cablegroup name="OneSecGrp_SectionRef_136"> <!-- Creating a group containing a single section: L5PCtemplate[0].apic[97]... -->
        <cable id = "182"/>
      </cablegroup>
      <cablegroup name="OneSecGrp_SectionRef_118"> <!-- Creating a group containing a single section: L5PCtemplate[0].apic[15]... -->
        <cable id = "100"/>
      </cablegroup>
      <cablegroup name="OneSecGrp_SectionRef_130"> <!-- Creating a group containing a single section: L5PCtemplate[0].apic[16]... -->
        <cable id = "101"/>
      </cablegroup>
      <cablegroup name="OneSecGrp_SectionRef_127"> <!-- Creating a group containing a single section: L5PCtemplate[0].apic[26]... -->
        <cable id = "111"/>
      </cablegroup>
      <cablegroup name="OneSecGrp_SectionRef_138"> <!-- Creating a group containing a single section: L5PCtemplate[0].apic[27]... -->
        <cable id = "112"/>
      </cablegroup>
      <cablegroup name="OneSecGrp_SectionRef_128"> <!-- Creating a group containing a single section: L5PCtemplate[0].apic[21]... -->
        <cable id = "106"/>
      </cablegroup>
      <cablegroup name="OneSecGrp_SectionRef_148"> <!-- Creating a group containing a single section: L5PCtemplate[0].apic[28]... -->
        <cable id = "113"/>
      </cablegroup>
      <cablegroup name="OneSecGrp_SectionRef_140"> <!-- Creating a group containing a single section: L5PCtemplate[0].apic[22]... -->
        <cable id = "107"/>
      </cablegroup>
      <cablegroup name="OneSecGrp_SectionRef_139"> <!-- Creating a group containing a single section: L5PCtemplate[0].apic[25]... -->
        <cable id = "110"/>
      </cablegroup>
      <cablegroup name="OneSecGrp_SectionRef_150"> <!-- Creating a group containing a single section: L5PCtemplate[0].apic[23]... -->
        <cable id = "108"/>
      </cablegroup>
      <cablegroup name="OneSecGrp_SectionRef_149"> <!-- Creating a group containing a single section: L5PCtemplate[0].apic[24]... -->
        <cable id = "109"/>
      </cablegroup>
      <cablegroup name="OneSecGrp_SectionRef_159"> <!-- Creating a group containing a single section: L5PCtemplate[0].apic[32]... -->
        <cable id = "117"/>
      </cablegroup>
      <cablegroup name="OneSecGrp_SectionRef_160"> <!-- Creating a group containing a single section: L5PCtemplate[0].apic[31]... -->
        <cable id = "116"/>
      </cablegroup>
      <cablegroup name="OneSecGrp_SectionRef_166"> <!-- Creating a group containing a single section: L5PCtemplate[0].apic[46]... -->
        <cable id = "131"/>
      </cablegroup>
      <cablegroup name="OneSecGrp_SectionRef_176"> <!-- Creating a group containing a single section: L5PCtemplate[0].apic[47]... -->
        <cable id = "132"/>
      </cablegroup>
      <cablegroup name="OneSecGrp_SectionRef_175"> <!-- Creating a group containing a single section: L5PCtemplate[0].apic[48]... -->
        <cable id = "133"/>
      </cablegroup>
      <cablegroup name="OneSecGrp_SectionRef_169"> <!-- Creating a group containing a single section: L5PCtemplate[0].apic[74]... -->
        <cable id = "159"/>
      </cablegroup>
      <cablegroup name="OneSecGrp_SectionRef_174"> <!-- Creating a group containing a single section: L5PCtemplate[0].apic[54]... -->
        <cable id = "139"/>
      </cablegroup>
      <cablegroup name="OneSecGrp_SectionRef_173"> <!-- Creating a group containing a single section: L5PCtemplate[0].apic[57]... -->
        <cable id = "142"/>
      </cablegroup>
      <cablegroup name="OneSecGrp_SectionRef_188"> <!-- Creating a group containing a single section: L5PCtemplate[0].apic[55]... -->
        <cable id = "140"/>
      </cablegroup>
      <cablegroup name="OneSecGrp_SectionRef_187"> <!-- Creating a group containing a single section: L5PCtemplate[0].apic[56]... -->
        <cable id = "141"/>
      </cablegroup>
      <cablegroup name="OneSecGrp_SectionRef_185"> <!-- Creating a group containing a single section: L5PCtemplate[0].apic[59]... -->
        <cable id = "144"/>
      </cablegroup>
      <cablegroup name="OneSecGrp_SectionRef_186"> <!-- Creating a group containing a single section: L5PCtemplate[0].apic[58]... -->
        <cable id = "143"/>
      </cablegroup>
      <cablegroup name="OneSecGrp_SectionRef_172"> <!-- Creating a group containing a single section: L5PCtemplate[0].apic[62]... -->
        <cable id = "147"/>
      </cablegroup>
      <cablegroup name="OneSecGrp_SectionRef_178"> <!-- Creating a group containing a single section: L5PCtemplate[0].apic[41]... -->
        <cable id = "126"/>
      </cablegroup>
      <cablegroup name="OneSecGrp_SectionRef_189"> <!-- Creating a group containing a single section: L5PCtemplate[0].apic[43]... -->
        <cable id = "128"/>
      </cablegroup>
      <cablegroup name="OneSecGrp_SectionRef_196"> <!-- Creating a group containing a single section: L5PCtemplate[0].apic[65]... -->
        <cable id = "150"/>
      </cablegroup>
      <cablegroup name="OneSecGrp_SectionRef_194"> <!-- Creating a group containing a single section: L5PCtemplate[0].apic[72]... -->
        <cable id = "157"/>
      </cablegroup>
      <cablegroup name="OneSecGrp_SectionRef_195"> <!-- Creating a group containing a single section: L5PCtemplate[0].apic[66]... -->
        <cable id = "151"/>
      </cablegroup>
    </cables>
    <biophysics  units = "Physiological Units"> <!-- Note: values of cond dens are different in NEURON and phy units-->
      <bio:mechanism name="pas" type="Channel Mechanism" passive_conductance="true">
        <bio:parameter name="gmax" value="0.0325">
          <bio:group>axon_group</bio:group>
        </bio:parameter>
        <bio:parameter name="gmax" value="0.0338">
          <bio:group>soma_group</bio:group>
        </bio:parameter>
        <bio:parameter name="gmax" value="0.0467">
          <bio:group>basal_dends</bio:group>
        </bio:parameter>
        <bio:parameter name="gmax" value="0.0589">
          <bio:group>apical_dends</bio:group>
        </bio:parameter>
        <bio:parameter name="e" value="-90">
          <bio:group>all</bio:group>
        </bio:parameter>
      </bio:mechanism>
      <bio:mechanism name="CaDynamics_E2_mod" type="Channel Mechanism">
        <bio:parameter name="gamma" value="0.000501">
          <bio:group>soma_group</bio:group>
        </bio:parameter>
        <bio:parameter name="gamma" value="0.000509">
          <bio:group>apical_dends</bio:group>
        </bio:parameter>
        <bio:parameter name="decay" value="122">
          <bio:group>apical_dends</bio:group>
        </bio:parameter>
        <bio:parameter name="decay" value="460">
          <bio:group>soma_group</bio:group>
        </bio:parameter>
        <bio:parameter name="depth" value="0.1">
          <bio:group>apical_dends_and_soma</bio:group>
        </bio:parameter>
        <bio:parameter name="minCai" value="0.0001">
          <bio:group>apical_dends_and_soma</bio:group>
        </bio:parameter>
      </bio:mechanism>
      <bio:mechanism name="Ca_HVA" type="Channel Mechanism">

        <bio:parameter name="gmax" value="0.992">
          <bio:group>soma_group</bio:group>
        </bio:parameter>
      </bio:mechanism>

      <bio:mechanism name="Ca_HVA" type="Channel Mechanism">
            <bio:variable_parameter name="gmax">
                <bio:group>apical_dends</bio:group>
                <bio:inhomogeneous_value param_name="PathLengthOverApicDends" value="(0.0555 + 0.4995 * ( H(p - 685) * H(885 - p) ))"/>

            </bio:variable_parameter>
        </bio:mechanism>

      <bio:mechanism name="Ca_LVAst" type="Channel Mechanism">

        <bio:parameter name="gmax" value="3.43">
          <bio:group>soma_group</bio:group>
        </bio:parameter>
      </bio:mechanism>

      <bio:mechanism name="Ca_LVAst" type="Channel Mechanism">
            <bio:variable_parameter name="gmax">
                <bio:group>apical_dends</bio:group>
                <bio:inhomogeneous_value param_name="PathLengthOverApicDends" value="(0.187 + 18.513 * ( H(p - 685) * H(885 - p) ))"/>

            </bio:variable_parameter>
        </bio:mechanism>

      <bio:mechanism name="Ih" type="Channel Mechanism">

        <bio:parameter name="gmax" value="0.2">
          <bio:group>basal_dends_and_soma</bio:group>
        </bio:parameter>

      </bio:mechanism>

      <bio:mechanism name="Ih" type="Channel Mechanism">
            <bio:variable_parameter name="gmax">
                <bio:group>apical_dends</bio:group>
                <bio:inhomogeneous_value param_name="PathLengthOverApicDends" value="0.2*(2.087*exp(p/359.65)-0.8696)"/>

            </bio:variable_parameter>
        </bio:mechanism>

      <bio:mechanism name="Im" type="Channel Mechanism">
        <bio:parameter name="gmax" value="0.0675">
          <bio:group>apical_dends</bio:group>
        </bio:parameter>
      </bio:mechanism>
      <bio:mechanism name="K_Pst" type="Channel Mechanism">
        <bio:parameter name="gmax" value="2.23">
          <bio:group>soma_group</bio:group>
        </bio:parameter>
      </bio:mechanism>
      <bio:mechanism name="K_Tst" type="Channel Mechanism">
        <bio:parameter name="gmax" value="81.2">
          <bio:group>soma_group</bio:group>
        </bio:parameter>
      </bio:mechanism>
      <bio:mechanism name="NaTa_t" type="Channel Mechanism">
        <bio:parameter name="gmax" value="21.3">
          <bio:group>apical_dends</bio:group>
        </bio:parameter>
        <bio:parameter name="gmax" value="2040">
          <bio:group>soma_group</bio:group>
        </bio:parameter>
      </bio:mechanism>
      <bio:mechanism name="Nap_Et2" type="Channel Mechanism">
        <bio:parameter name="gmax" value="1.72">
          <bio:group>soma_group</bio:group>
        </bio:parameter>
      </bio:mechanism>
      <bio:mechanism name="SK_E2" type="Channel Mechanism">
        <bio:parameter name="gmax" value="1.2">
          <bio:group>apical_dends</bio:group>
        </bio:parameter>
        <bio:parameter name="gmax" value="44.1">
          <bio:group>soma_group</bio:group>
        </bio:parameter>
      </bio:mechanism>
      <bio:mechanism name="SKv3_1" type="Channel Mechanism">
        <bio:parameter name="gmax" value="0.261">
          <bio:group>apical_dends</bio:group>
        </bio:parameter>
        <bio:parameter name="gmax" value="693">
          <bio:group>soma_group</bio:group>
        </bio:parameter>
      </bio:mechanism>
      <bio:spec_capacitance>
        <bio:parameter value="1">
          <bio:group>soma_and_axon</bio:group>
        </bio:parameter>
        <bio:parameter value="2">
          <bio:group>dendrite_group</bio:group>
        </bio:parameter>
      </bio:spec_capacitance>
      <bio:spec_axial_resistance>
        <bio:parameter value="0.1">
          <bio:group>all</bio:group>
        </bio:parameter>
      </bio:spec_axial_resistance>
    </biophysics>
  </cell>
</cells>
</neuroml>
